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n := 3
A := [n, n + 1, n + 2; n - 3, n - 2, n; n - 1, n, n + 1] = [3, 4, 5; 0, 1, 3; 2, 3, 4]
B := [6*n + 8; 6*n - 7; 6*n + 2] = [26; 11; 20]
[x; y; z] := A^-1*B
X := [x; y; z]
X = [1; 2; 3]
x := X[0]
y := X[1]
z := X[2]
x = 1
y = 2
z = 3
A*X = [26; 11; 20]
Given
y1 := n*x + (n + 1)*y + (n + 2)*z == 6*n + 8
y2 := (n - 3)*x + (n - 2)*y + n*z == 6*n - 7
y3 := (n - 1)*x + n*y + (n + 1)*z == 6*n + 2
A := Find(x, y, z) = [1; 2; 3]
x := A[0]
y := A[1]
z := A[2]
n*x + (n + 1)*y + (n + 2)*z = 26
6*n + 8 = 26
(n - 3)*x + (n - 2)*y + n*z = 11
6*n - 7 = 11
(n - 1)*x + n*y + (n + 1)*z = 20
6*n + 2 = 20
