# 14 задание
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Given
x := 4
x^2/81 + y^2/16 == 1
y := 4
(x - 9)^2 + (y - 2)^2 == 25
Find(x, y) = [4.23934; 3.52845]
y1(x) := sqrt(1 - x^2/81)*4
y3(x) := sqrt(25 - (x - 9)^2) + 2
Given
x := 7
y4(x) := -sqrt(25 - (x - 9)^2) + 2
y2(x) := sqrt(1 - x^2/81)*(-4)
y := -3
x^2/81 + y^2/16 == 1
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(x - 9)^2 + (y - 2)^2 == 25
Find(x, y) = [6.9308; -2.55175]
x^2/81 + y^2/16 - 1 == (x - 9)^2 + (y - 2)^2 - 25
solve, x, y → solve, 7, -3
