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f(x) := x*sin(x)
x := 0 .. 10
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x := 2
x := Maximize(f, x)
x = 2.02876
f(x) = 1.81971
x := 5
x := Minimize(f, x)
x = 4.91318
f(x) = -4.81447
x := 8
x := Maximize(f, x)
x = 7.97867
f(x) = 7.91673
