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x := -2, -1.6 .. 2
n := 2
f(x) := (x^2 - (n*x) + sin(x))*sqrt(|x - cos(n*x)|)
x = [-2; -1.6; -1.2; -0.8; -0.4; 0; 0.4; 0.8; 1.2; 1.6; 2]
f(x) = [8.22753; 3.69265; 1.97785; 1.33681; 0.597535; 0; -0.136494; -0.220952; -0.0389189; 0.579605; 1.48125]
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